Hc := 15.8
v := 0.0055
ψуд := 0.015
k := 2
F := 407
tmax := sqrt(k*F/(π*v^2)) = 2926.68
Ψ := limit(ψуд*π*v^2*t^2, t → tmax) → 12.21
A := limit(π*v^2*sqrt(k*f/(π*v^2))^2, f → F) → 814.0
HRRPUA := Hc*Ψ*A = 157035
log(HRRPUA)*1000 = 5196
