Hc := 14.002
k := 2
m := 1000
v := 0.022
Fпом := 5.664
τ := 500
ψ := 0.021
Hпом := 3
tmax := sqrt(k*Fпом/(π*v^2)) = 86.3136
Ψ(t) := ψ*π*v^2*t^2
HRR(t) := Hc*Ψ(t)*0.93*m
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Ψ := ψ*π*v^2*tmax^2 = 0.237888
HRR := Hc*Ψ*0.93*1000 = 3097.74
M := Ψ*tmax = 20.533
M := 10
Ψ := M/tmax
HRR := Hc*Ψ*0.93*1000 = 1508.67
Ψ(t) := ψ*π*v^2*t^2/2
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HRR(t) := Hc*Ψ(t)*0.93*1000
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