Hc := 15.800
k := 2
m := 1000
v := 0.0055
Fпом := 402
τ := 300
ψ := 0.015
Hпом := 3
tmax := sqrt(k*Fпом/(π*v^2)) = 2908.64
Ψ(t) := ψ*π*v^2*t^2
HRR(t) := Hc*Ψ(t)*0.93*m
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Ψ := ψ*π*v^2*tmax^2 = 12.06
HRR := Hc*Ψ*0.93*1000 = 177210
M := Ψ*tmax = 35078.2
M := 10
Ψ := M/tmax
HRR := Hc*Ψ*0.93*1000 = 50.5184
Ψ(t) := ψ*π*v^2*t^2/2
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HRR(t) := Hc*Ψ(t)*0.93*1000
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