Hpom := 3
v := 0.0068
Fpom := 500
K := 50
q := 729.1
Cs := 0.425
ψyd := 0.0233
k := 4
n := 1
HRR := 31.700
hu := Hpom - Cs
λ := 0.71
T0 := 24
t := 300
L := 4
Tpasp := 57
t := sqrt(k*Fpom/(π*v^2))  # disabled
r := λ*L = 2.84
Slik := n*π*r^2 = 25.3388
Ψ := ψyd*π*v^2*t^2 = 0.304625
q := Ψ*1000*0.93 = 283.302
tlik := (Slik/π)^0.5/v = 417.647
kf :=
    1.19*(q*v^2/hu)^(1/6)/K if hu > 6.775*r
    0.53*(q*v^2)^(1/6)*hu^(1/4)*(K*r^(5/12))^-1 if hu ≤ 6.775*r
    = 0.00422016
kS := 0.35*kf*v^(-4/3) = 1.14653
kT :=
    28.76*K*q^0.5*v*(hu^1.25*r^0.25)^-1 if hu < 5.577*r
    90.42*K*q^0.5*v*r^(5/12)/hu^(23/12) if 5.577*r < hu ≤ 6.775*r
    40.76*K*q^0.5*v/hu^1.5 if hu ≥ 6.775*r
    = 38.8679
Tkol := T0 + kT*(kS*Slik^(2/3) + e^(-kS*Slik^(2/3)) - 1) = 369.579
Hkr := 5.45*(q*Slik)^0.4/(Tpasp - T0)^0.6 = 23.3186
X := 1 + (Tpasp - T0)/kT = 1.84903
(Tpasp - T0)/kT = 0.849029
taktoros := (1.33*X/kf)^0.75 = 118.604
Tpasp := T0 + kT*(X + e^(-X) - 1) = 63.1174
# Проверка условия X <- (Tpasp-T0)/kT
(Tpasp - T0)/kT = 1.00642
X := 0.75*kf*taktoros^(4/3) = 1.84441
taktoros := (1.33*X/kf)^0.75 = 118.382
Tpasp := T0 + kT*(X + e^(-X) - 1) = 62.9661
S := π*(taktoros*v)^2 = 2.03581
S < Slik
taktoros < tlik
= 1
