# Определение аэродинамических характеристик здания по кэффициентам ветрового напора
α := 30
kn := 0.8
kτ := -0.6
kα := kn*sin(α)^2 + kτ*cos(α)^2 = 0.766689
# Определение массового расхода удаляемых продуктов горения непосредственно из помещений осуществляется на основе уравнения неразрывности вида
Asm*d/dτ(ρsm*h) == Gk - Gsm
# где ,  - массовый расход в конвективной колонке и удаляемых продуктов горения соответственно, кг/с;  - средняя плотность газа в дымовом слое, образующемся в верхней части горящего помещения, кг/м;  - толщина образующегося дымового слоя, м;  - эквивалентная площадь сечения дымового слоя в горизонтальной плоскости, м
# Для решения указанного уравнения необходимо дополнительное использование зависимостей для мощности тепловыделения очага пожара:
ψyd := 0.0142
k := 2
apom := 25
η := 0.93
Qp := 14.000
v := 0.0045
Fpom := 50
bpom := 20
Asm := Fpom
tmax := sqrt(k*Fpom/(π*v^2)) = 1253.75
Ψ := ψyd*π*v^2*tmax^2 = 1.42
Mf := Ψ*tmax = 1780.33
mn := 1500
Ψf := mn/tmax = 1.19641
HRRPUA := Qp*1000*ψyd*η = 184.884
HRR := Qp*1000*Ψf*η = 15577.2
Qf := HRR
MFLOW := 3.1948183
ρVM := 0.80710459
MFLOW*ρVM^-1 = 3.95837  # Koridor
MFLOW*ρVM^-1*0.7 = 2.77086
MFLOW*ρVM^-1*3600 = 14250.1
MFLOW*ρVM^-1*3600*0.7 = 9975.09
MFLOW := 7.8
ρVM := 0.4
MFLOW*ρVM^-1 = 19.5
1500*50 = 75000
MFLOW*ρVM^-1*0.7 = 13.65  # Pom s ochagom
MFLOW*ρVM^-1*3600 = 70200
MFLOW*ρVM^-1*3600*0.7 = 49140
# Проектом таким-то расчетная величина массового
# Средняя температура дымового слоя:
lsm := 2*(apom + bpom) = 90
εd := 0.7
ρ0 := 101325
ρr := 1.2
T0 := 38 + 273.15
Asm := Fpom
Mв := 0.029
Tr := T0
R := 8.314
Hpom := 3
g := Qf/Asm = 311.544
h := 0
cpsm := 1
Tmax := T0 + 224*g^0.528 = 4954.45
Tmax := T0 + 940*e^(0.0047*g - 0.141) = 3841.45
cpk := 1.11 + 0.00024*(Tmax - T0) = 1.95727
cpsm := -0.00000000009615384615*Tmax^3 + 1.1913086913e-7*Tmax^2 + 0.000242070429573*Tmax + 1.0425 = -1.72031
α := 0.01163*e^(0.0023*(Tmax - T0)) = 39.0764
ρd := ρ0*Mв/(R*Tmax) = 0.0920046
h := 0.071*Qf^(1/3)*Hpom^(5/3)/(ρd*Asm) = 2.40535
Gk := 0.071*(εd*Qf)^(1/3)*(Hpom - h)^(5/3) + 0.0018*(εd*Qf) = 20.2893
Vd := Gk*tmax/ρd = 276485
Tsm := T0 + cpsm/cpk*εd*Qf/(α*(h*lsm + Asm))*(1 - e^(-α*(h*lsm + Asm)/(cpsm*Gk))) = 3.38736e129
ρsm := ρr*Tr/Tsm = 1.10227e-127
Asm*d/dτ(ρsm*h) == Gk - Gsm
η := 0.93
ψyd := 0.015
k := 2
apom := 25
Qh := 15.800
v := 0.0055
T0 := 38 + 273.15
bpom := 20
Fpom := apom*bpom
tmax := sqrt(k*Fpom/(π*v^2)) = 3243.86
Ψ(t) := ψyd*π*v^2*t^2
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HRR(t) := Qh*1000*Ψ(t)*η
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Tg(t) := T0 + 224*Ψ(t)^0.528
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Tg(tmax) = 1247.04
ρ0 := 101353
Hpom := 5
Mв := 0.029
t := 60
R := 8.317
Asm := 50
T0 := 38 + 273.15
kp := ρ0*Mв/R = 353.401
ksh(t) := 0.071*Hpom^(3/5)*t/kp
ksh(t) = 0.0316609
Tg(t) = 324.994
h := ksh(t)*HRR(t)^(1/3)*(Tg(t) - T0)^2/Asm = 0.51274
kρ := ρ0*Mв/(R*(580 + 273.15)) = 0.414231
0.02*t/kρ = 2.89693
ρd := 3.25
ρsm := -0.00000000130769230769*58^3 + 3.33501498501e-6*58^2 - 0.00298471028971*58 + 1.25593406593 = 1.09378
ρd/ρsm*t/Asm = 3.5656
Hpom := 2.8
T0 = 311.15
Ts := 555 + 273.15
kf := 0.1
ΔT := Ts - T0
Qf := 2773
t := 50
Z := Hpom - 0.08*(Qf^2/(Asm*ΔT))^(1/5) = 2.55009
h := 1.4
ρsm := 1.24
Asm = 50
Asm*h*ρsm = 86.8
