golovka := "медная"
Hpom := 3
v := 0.0055
Fpom := 500
n := 1
q := 729.1
Cs := 0.2125
ψyd := 0.015
k := 2
T0 := 24
HRR := 13.800
K :=
    sqrt(0.265*0.46/0.05) if golovka == "стальная"
    sqrt(0.265*0.386/0.385) if golovka == "медная"
    sqrt(0.265*0.375/0.11) if golovka == "латунная"
    = 0.51545
hu := Hpom - Cs
λ := 0.71
Tpasp := 57
t := 300
L := 4
t := sqrt(k*Fpom/(π*v^2)) = 3243.86
r := λ*L = 2.84
Slik := n*π*r^2 = 25.3388
Ψ := ψyd*π*v^2*t^2 = 15
q := Ψ*1000*0.93 = 13950
tlik := (Slik/π)^0.5/v = 516.364
kf :=
    1.19*(q*v^2/hu)^(1/6)/K if hu > 6.775*r
    0.53*(q*v^2)^(1/6)*hu^(1/4)*(K*r^(5/12))^-1 if hu ≤ 6.775*r
    = 0.744836
kS := 0.35*kf*v^(-4/3) = 268.521
kT :=
    28.76*K*q^0.5*v*(hu^1.25*r^0.25)^-1 if hu < 5.577*r
    90.42*K*q^0.5*v*r^(5/12)/hu^(23/12) if 5.577*r < hu ≤ 6.775*r
    40.76*K*q^0.5*v/hu^1.5 if hu ≥ 6.775*r
    = 2.05957
Tkol := T0 + kT*(kS*Slik^(2/3) + e^(-kS*Slik^(2/3)) - 1) = 4792.98
Hkr := 5.45*(q*Slik)^0.4/(Tpasp - T0)^0.6 = 110.824
X := 1 + (Tpasp - T0)/kT = 17.0228
(Tpasp - T0)/kT = 16.0228
taktoros := (1.33*X/kf)^0.75 = 12.9454
Tpasp := T0 + kT*(X + e^(-X) - 1) = 57
# Проверка условия X <- (Tpasp-T0)/kT
(Tpasp - T0)/kT = 16.0228
X := 0.75*kf*taktoros^(4/3) = 16.9802
taktoros := (1.33*X/kf)^0.75 = 12.9211
Tpasp := T0 + kT*(X + e^(-X) - 1) = 56.9124
S := π*(taktoros*v)^2 = 0.0158663
S < Slik
taktoros < tlik
= 1
