t0 := 24
a := 30
Qн := 13.800
v := 0.0055
k := 2
cp := 2*10^-3
b := 20
hпл := 0
ψyd := 0.015
Fpom := 500
η := 0.93
H := 3
zпл := 0
tmax := sqrt(k*Fpom/(π*v^2)) = 3243.86
φ := 0.3
V := a*b*H = 1800
δ := hпл - zпл = 0
Ψ := Qн*ψyd*π*v^2*tmax^2 = 207
B := 353*cp*V/((1 - φ)*η*Qн) = 141.455
n := Ψ
h := hпл + 1.7 - 0.5*δ = 1.7
z :=
    h/H*e^(1.4*h/H) if H ≤ 6
    "nothing" if H > 6
    = 1.25276
A := 1.05*ψyd*V^2*n = 10563210
tT := (B/A*ln(1 + (70 - t0)/((273 + t0)*z)))^(1/n) = 0.937451
tmax := tmax*tT/60 = 50.6827
