Hc := 14.002
k := 2
m := 1000
v := 0.022
Fпом := 65
τ := 300
ψ := 0.021
Hпом := 3
tmax := sqrt(k*Fпом/(π*v^2)) = 292.398
# Heat Release Rate (HRR)
# Mass Loss Rate (MLR)
# Heat Release Rate Per Unit Area (HRRPUA)
Ψ(t) := ψ*π*v^2*t^2
HRR(t) := Hc*Ψ(t)*0.93*m
кг/(м^2*с)*м/с*c == кг/(м*с)
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q := 14.002
m := 140*2 = 280  # (G)
МДж
Q := m*q = 3920.56
МДж/м^2
g := Q/Fпом = 60.3163
g/ψ = 2872.21
Ψ := ψ*π*v^2*tmax^2 = 2.73
HRR := Hc*Ψ*0.93*1000 = 35549.7
M := Ψ*tmax = 798.246
кг/с*с == кг
M := 10
кг/(кг/(м^2*c)) == кг*м^2*c/(кг*м^2) == с
1/ψ = 47.619
Ψ := M/tmax
HRR := Hc*Ψ*0.93*1000 = 445.347
Ψ(t) := ψ*π*v^2*t^2/2
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HRR(t) := Hc*Ψ(t)*0.93*1000
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9/2500 = 0.0036  # МВт/кг
