Hc := 13.800
k := 2
m := 1000
v := 0.0045
Fпом := 50
τ := 300
ψ := 0.0145
Hпом := 3
tmax := sqrt(k*Fпом/(π*v^2)) = 1253.75
# Heat Release Rate (HRR)
# Mass Loss Rate (MLR)
# Heat Release Rate Per Unit Area (HRRPUA)
Ψ(t) := ψ*π*v^2*t^2
HRR(t) := Hc*Ψ(t)*0.93*m
кг/(м^2*с)*м/с*c == кг/(м*с)
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q := Hc = 13.8
m := 140*2 = 280  # (G)
МДж
Q := m*q = 3864
МДж/м^2
g := Q/Fпом = 77.28
g/ψ = 5329.66
Ψ := ψ*π*v^2*tmax^2 = 1.45
HRR := Hc*Ψ*0.93*1000 = 18609.3
M := Ψ*tmax = 1817.94
кг/с*с == кг
M := 10
кг/(кг/(м^2*c)) == кг*м^2*c/(кг*м^2) == с
1/ψ = 68.9655
Ψ := M/tmax
HRR := Hc*Ψ*0.93*1000 = 102.365
Ψ(t) := ψ*π*v^2*t^2/2
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HRR(t) := Hc*Ψ(t)*0.93*1000
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9/2500 = 0.0036  # МВт/кг
τ := 300
# В приведённых рассуждениях есть как правильные, так и спорные моменты.
#
# Проверка первого случая (Ψ(t) постоянна)
#
# Задано: Ψ(t) = ψ·π·v²·t².
#
# При t = τ, Ψ(τ) = 0.083021.
#
# Далее масса M = Ψ(τ)·τ = 24.906154.
#
# Если допустить, что все коэффициенты (ψ, v) выбраны верно, формулы выполнены корректно — это прямое применение зависимости площади пожара от времени при постоянной интенсивности.
#
# Проверка второго случая (Ψ(t) непостоянна)
#
# Задано: Ψ(t) = (1/3)·ψ·π·v²·t³.
#
# При t = 300 получено Ψ(300) = 8.302051.
#
# Математически это соответствует учёту роста интегрального показателя с добавлением множителя 1/3 при интегрировании переменной Ψ(t), то есть формула корректна для линейного роста скорости распространения.
#
# Вывод
#
# - Математическая логика перехода от первой к второй формуле верна — вторая выражает интеграл от переменной функции, что объясняет появление множителя 1/3 и степени t³.
#
# - Численные значения выглядят согласованными с моделью, но их физическая корректность зависит от правильности заданных ψ, v и τ.
#
# - Концептуально рассуждения правильны, ошибок в формулах нет, однако интерпретацию результатов следует проверять на соответствие реальным параметрам пожара.
# Вычисляем, сколько кг нагрузки охвачено пожаром за время t, если t является постоянной, а Ψ(t) - является граничным условием:
Ψ(t) := ψ*π*v^2*t^2
Ψ(τ) = 0.0830205
M := Ψ(τ)*τ = 24.9062
# Вычисляем, сколько кг нагрузки охвачено пожаром за время t, если t является непостоянной, а Ψ(t) - прияет на параметры пожара во время моделирования напрямую:
Ψ(t) := 1/3*ψ*π*v^2*t^3
# Здесь полная масса ГН, охватываемая пожаром с течением времени, задается аналитически и усредняется при интегрировании Ψ(t) по времени t.
Ψ(τ) = 8.30205
tmax := sqrt(k*Fпом/(π*v^2))
Ψ := ψ*π*v^2*t^2  # error: This variable is undefined.
# Перепишем π*v^2*t^2 = S. Тогда:
Ψ := ψ*S
Q(t) := Hf*Ψ*η  # error: This variable is undefined.
